// SBML level 3 version 2
// Created with https://github.com/matthiaskoenig/sbmlutils.

model losartan_kidney(Vext, Vki, Vurine, los_ext, los_urine, e3174_ext, e3174_urine, l158_ext, l158_urine)
  // Model for renal excretion of losartan, E3174, and L158.
  // version 1
  // Changelog
  // version 1
  // initial model
  // The content of this model has been carefully created in a manual research effort.
  // Terms of use
  // Copyright © 2026 Matthias König.
  // This work is licensed under a Creative Commons Attribution 4.0 International License.
  // Redistribution and use of any part of this model, with or without modification, are permitted provided that the following conditions are met:
  // Redistributions of this SBML file must retain the above copyright notice, this list of conditions and the following disclaimer.
  // Redistributions in a different form must reproduce the above copyright notice, this list of conditions and the following disclaimer in the documentation and/or other materials provided with the distribution.
  // This model is distributed in the hope that it will be useful, but WITHOUT ANY WARRANTY; without even the implied warranty of MERCHANTABILITY or FITNESS FOR A PARTICULAR PURPOSE.
  // occursIn FMA:7203 BTO:0000671 ncit:C12415
  // hasProperty ncit:C79372 mamo:MAMO_0000046 ncit:C66869 ncit:C29165 ncit:C66930 ncit:C2985
  // hasTaxon taxonomy:9606 snomedct:337915000
  // isDescribedBy doi:10.3390/pharmaceutics18020262 doi:10.36903/physiome.31359823 doi:10.5281/zenodo.14761114
  // model units - substance: mmole, time: min, volume: litre, area: m2, length: metre, extent: mmole

  // Compartments:
  compartment Vext = 1.5 litre; Vext is "plasma";  // SBO:0000290 ncit:C13356 BTO:0000131
  compartment Vki = 0.3 litre; Vki is "kidney";  // SBO:0000290 FMA:7203 BTO:0000671 ncit:C12415
  compartment Vmem = NaN; Vmem has m2; Vmem is "plasma membrane";  // 2-D; SBO:0000290 ncit:C13735 FMA:63841 GO:0005886
  compartment Vurine = 1 litre;  // SBO:0000290 FMA:12274 ncit:C13283 BTO:0001419

  // Species:
  species los_ext in Vext = 0; los_ext is "losartan (plasma)";  // SBO:0000247 pubchem.compound:11751549 CHEBI:6541 snomedct:108582002
  substanceOnly species los_urine in Vurine = 0; los_urine is "losartan (urine)";  // SBO:0000247 pubchem.compound:11751549 CHEBI:6541 snomedct:108582002
  species e3174_ext in Vext = 0; e3174_ext is "e3174 (plasma)";  // SBO:0000247 pubchem.compound:108185 CHEBI:74125
  substanceOnly species e3174_urine in Vurine = 0; e3174_urine is "e3174 (urine)";  // SBO:0000247 pubchem.compound:108185 CHEBI:74125
  species l158_ext in Vext = 0; l158_ext is "l158 (plasma)";  // SBO:0000247
  substanceOnly species l158_urine in Vurine = 0; l158_urine is "l158 (urine)";  // SBO:0000247

  // Parameters:
  // scaling factor for renal function. 1.0: normal renal function; <1.0: impaired renal function; >1.0 increased renal function
  f_renal_function = 1 dimensionless;  // SBO:0000009
  LOSEX_k = 0.07738962 per_min; LOSEX_k is "rate urinary excretion losartan";  // SBO:0000009
  E3174EX_k = 0.02892717 per_min; E3174EX_k is "rate urinary excretion E3174";  // SBO:0000009
  L158EX_k = 0.2889083 per_min; L158EX_k is "rate urinary excretion L158";  // SBO:0000009

  // Reactions:
  LOSEX: los_ext => los_urine; f_renal_function*LOSEX_k*Vki*los_ext; LOSEX is "losartan excretion (LOSEX)";  // SBO:0000655
  E3174EX: e3174_ext => e3174_urine; f_renal_function*E3174EX_k*Vki*e3174_ext; E3174EX is "e3174 excretion (E3174EX)";  // SBO:0000655
  L158EX: l158_ext => l158_urine; f_renal_function*L158EX_k*Vki*l158_ext; L158EX is "l158 excretion (L158EX)";  // SBO:0000655

  // Unit definitions:
  unit g_per_mole = gram / mole; g_per_mole is "g/mole";
  unit l_per_min = litre / (60 second); l_per_min is "l/min";
  unit m2 = metre^2; m2 is "meter^2";
  unit mM = 1e-3 mole / litre; mM is "mmole/liter";
  unit mg = 1e-3 gram;
  unit mg_per_g = 1e-3 gram / gram; mg_per_g is "mg/g";
  unit mg_per_s_l = 1e-3 gram / (second * litre); mg_per_s_l is "mg/s/l";
  unit min = 60 second;
  unit min_per_hr = 60 second / (3600 second); min_per_hr is "min/hour";
  unit ml_per_l = 1e-3 litre / litre; ml_per_l is "ml/l";
  unit ml_per_min = 1e-3 litre / (60 second); ml_per_min is "ml/min";
  unit mmole = 1e-3 mole;
  unit mmole_per_min = 1e-3 mole / (60 second); mmole_per_min is "mmole/min";
  unit mmole_per_min_l = 1e-3 mole / (60 second * litre); mmole_per_min_l is "mmole/min/l";
  unit per_min = 1 / (60 second); per_min is "1/min";
  unit per_mmole = 1 / (1e-3 mole); per_mmole is "1/mmole";
end
