// SBML level 3 version 2
// Created with https://github.com/matthiaskoenig/sbmlutils.

model losartan_liver(Vext, Vli, Vbi, Vlumen, los_ext, los_lumen, e3174_ext, e3174_lumen, l158_ext, l158_lumen)
  // Model for hepatic losartan metabolism.
  // Model for losartan metabolism.
  // metabolism of losartan -> exp3174 (liver CYP2C9)
  // Terms of use
  // The content of this model has been carefully created in a manual research effort. This file has been created by Matthias König using sbmlutils. For questions contact koenigmx@hu-berlin.de. Copyright © 2025 Matthias König.
  // This work is licensed under a Creative Commons Attribution 4.0 International License.
  // Redistribution and use of any part of this model, with or without modification, are permitted provided that the following conditions are met:
  // Redistributions of this SBML file must retain the above copyright notice, this list of conditions and the following disclaimer.
  // Redistributions in a different form must reproduce the above copyright notice, this list of conditions and the following disclaimer in the documentation and/or other materials provided with the distribution.
  // This model is distributed in the hope that it will be useful, but WITHOUT ANY WARRANTY; without even the implied warranty of MERCHANTABILITY or FITNESS FOR A PARTICULAR PURPOSE.
  // model units - substance: mmole, time: min, volume: litre, area: m2, length: metre, extent: mmole

  // Compartments:
  compartment Vext = 1.5 litre; Vext is "plasma";  // SBO:0000290 ncit:C13356 BTO:0000131
  compartment Vli = 1.5 litre; Vli is "liver";  // SBO:0000290 FMA:7197 BTO:0000759 ncit:C12392
  compartment Vmem = NaN; Vmem has m2; Vmem is "plasma membrane";  // 2-D; SBO:0000290 ncit:C13735 FMA:63841 GO:0005886
  compartment Vapical = NaN; Vapical has m2; Vapical is "apical membrane";  // 2-D; SBO:0000290 FMA:84666 GO:0016324
  compartment Vbi = 1 litre; Vbi is "bile";  // SBO:0000290 FMA:62971 ncit:C13192
  compartment Vlumen = 1.15425 litre; Vlumen is "intestinal lumen (inner part of intestine)";  // SBO:0000290 FMA:14586 UBERON:0018543

  // Species:
  species los_ext in Vext = 0; los_ext is "losartan (plasma)";  // SBO:0000247 pubchem.compound:11751549 CHEBI:6541 snomed:108582002
  species los in Vli = 0; los is "losartan (liver)";  // SBO:0000247 pubchem.compound:11751549 CHEBI:6541 snomed:108582002
  // Bile losartan amount.
  substanceOnly species los_bi in Vbi = 0; los_bi is "losartan (bile)";  // SBO:0000247 pubchem.compound:11751549 CHEBI:6541 snomed:108582002
  species los_lumen in Vlumen = 0; los_lumen is "losartan (lumen)";  // SBO:0000247 pubchem.compound:11751549 CHEBI:6541 snomed:108582002
  species e3174_ext in Vext = 0; e3174_ext is "E3174 (plasma)";  // SBO:0000247 pubchem.compound:108185 CHEBI:74125
  species e3174 in Vli = 0; e3174 is "E3174 (liver)";  // SBO:0000247 pubchem.compound:108185 CHEBI:74125
  // Bile E3174 amount.
  substanceOnly species e3174_bi in Vbi = 0; e3174_bi is "E3174 (bile)";  // SBO:0000247 pubchem.compound:108185 CHEBI:74125
  species e3174_lumen in Vlumen = 0; e3174_lumen is "E3174 (lumen)";  // SBO:0000247 pubchem.compound:108185 CHEBI:74125
  species l158_ext in Vext = 0; l158_ext is "L158 (plasma)";  // SBO:0000247
  species l158 in Vli = 0; l158 is "L158 (liver)";  // SBO:0000247
  // Bile L158 amount.
  substanceOnly species l158_bi in Vbi = 0; l158_bi is "L158 (bile)";  // SBO:0000247
  species l158_lumen in Vlumen = 0; l158_lumen is "L158 (lumen)";  // SBO:0000247

  // Parameters:
  // Relative activity of the enzyme: 1.0 - normal activity (wildtype); <1.0 reduced activity; >1.0 increased activity.
  f_cyp2c9 = 1 dimensionless; f_cyp2c9 is "activity of CYP2C9";  // SBO:0000186
  MBIEX_k = 0.0001 per_min; MBIEX_k is "rate for export in bile";  // SBO:0000009
  LOSIM_Vmax = 0.01 mmole_per_min_l; LOSIM_Vmax is "Vmax losartan import";  // SBO:0000186
  // in vitro data?
  LOSIM_Km_los = 0.1 mM; LOSIM_Km_los is "Km losartan import";  // SBO:0000027
  LOS2E3174_Vmax = 0.01 mmole_per_min_l; LOS2E3174_Vmax is "Vmax losartan conversion";  // SBO:0000186
  // FIXME: check in vitro data
  // 1.12 +- 0.13 µM [Maekawa2009]
  // 1.134 µM [Thu2017]
  // 1.05 +- 0.017 µM [Wang2014]
  LOS2E3174_Km_los = 0.0011 mM; LOS2E3174_Km_los is "Km losartan conversion";  // SBO:0000027
  LOS2L158_Vmax = 0.02 mmole_per_min_l; LOS2L158_Vmax is "Vmax losartan conversion";  // SBO:0000186
  LOS2L158_Km_los = 0.1 mM; LOS2L158_Km_los is "Km losartan conversion";  // SBO:0000027
  E3174EX_Vmax = 1 mmole_per_min_l; E3174EX_Vmax is "Vmax E3174 export";  // SBO:0000186
  E3174EX_Km_e3174 = 0.01 mM; E3174EX_Km_e3174 is "Km E3174 export";  // SBO:0000027
  L158EX_Vmax = 1 mmole_per_min_l; L158EX_Vmax is "Vmax L158 export";  // SBO:0000186
  L158EX_Km_l158 = 0.01 mM; L158EX_Km_l158 is "Km L158 export";  // SBO:0000027

  // Reactions:
  // Organic Anion Transporting Polypeptide 2B1 (OATP2B1): Recent findings suggest that losartan is also a substrate for OATP2B1, a transporter that plays a crucial role in the uptake of various drugs into hepatocytes. This transporter facilitates the entry of losartan into liver cells, where it can be metabolized by cytochrome P450 enzymes. [perplexity]
  LOSIM: los_ext -> los; LOSIM_Vmax/LOSIM_Km_los*Vli*(los_ext - los)/(1 + los_ext/LOSIM_Km_los + los/LOSIM_Km_los); LOSIM is "losartan import (LOSIM)";  // SBO:0000655
  // Likely catalyzed CYP2C9 and CYP3A4. Currently only modified via CYP2C9 factor.
  LOS2E3174: los => e3174; f_cyp2c9*LOS2E3174_Vmax*Vli*los/(los + LOS2E3174_Km_los); LOS2E3174 is "E3174 formation (CYP2C9/3A4)";  // SBO:0000176
  // Formation of losartan glucuronides, likely via UGT enzymes.
  LOS2L158: los => l158; LOS2L158_Vmax*Vli*los/(los + LOS2L158_Km_los); LOS2L158 is "L158 formation (UGT)";  // SBO:0000176
  E3174EX: e3174 -> e3174_ext; E3174EX_Vmax/E3174EX_Km_e3174*Vli*(e3174 - e3174_ext)/(1 + e3174_ext/E3174EX_Km_e3174 + e3174/E3174EX_Km_e3174); E3174EX is "E3174 export (E3174EX)";  // SBO:0000655
  L158EX: l158 -> l158_ext; L158EX_Vmax/L158EX_Km_l158*Vli*(l158 - l158_ext)/(1 + l158_ext/L158EX_Km_l158 + l158/L158EX_Km_l158); L158EX is "L158 export (L158EX)";  // SBO:0000655
  LOSBIEX: los => los_bi; MBIEX_k*Vli*los; LOSBIEX is "Losartan bile export";  // SBO:0000655
  LOSEHC: los_bi => los_lumen; LOSBIEX; LOSEHC is "Losartan enterohepatic circulation";  // SBO:0000655
  E3174BIEX: e3174 => e3174_bi; MBIEX_k*Vli*e3174; E3174BIEX is "E3174 bile export";  // SBO:0000655
  E3174EHC: e3174_bi => e3174_lumen; E3174BIEX; E3174EHC is "E3174 enterohepatic circulation";  // SBO:0000655
  L158BIEX: l158 => l158_bi; MBIEX_k*Vli*l158; L158BIEX is "L158 bile export";  // SBO:0000655
  L158EHC: l158_bi => l158_lumen; L158BIEX; L158EHC is "L158 enterohepatic circulation";  // SBO:0000655

  // Unit definitions:
  unit g_per_mole = gram / mole; g_per_mole is "g/mole";
  unit l_per_min = litre / (60 second); l_per_min is "l/min";
  unit m2 = metre^2; m2 is "meter^2";
  unit mM = 1e-3 mole / litre; mM is "mmole/liter";
  unit mg = 1e-3 gram;
  unit mg_per_s_l = 1e-3 gram / (second * litre); mg_per_s_l is "mg/s/l";
  unit min = 60 second;
  unit min_per_hr = 60 second / (3600 second); min_per_hr is "min/hour";
  unit mmole = 1e-3 mole;
  unit mmole_per_min = 1e-3 mole / (60 second); mmole_per_min is "mmole/min";
  unit mmole_per_min_l = 1e-3 mole / (60 second * litre); mmole_per_min_l is "mmole/min/l";
  unit per_min = 1 / (60 second); per_min is "1/min";
  unit per_mmole = 1 / (1e-3 mole); per_mmole is "1/mmole";
end
